New Line.l1 bus1=source.1.2.3 bus2=b1.1.2.3 phases=3 linecode=research_small_illustrative_3ph length=0.202385768995 units=km normamps=180
New Line.l2 bus1=b1.1.2.3 bus2=b2.1.2.3 phases=3 linecode=research_small_illustrative_3ph length=0.202385768995 units=km normamps=180
New Line.l3 bus1=b2.1.2.3 bus2=b3.1.2.3 phases=3 linecode=research_small_illustrative_3ph length=0.202385768995 units=km normamps=180
New Line.l4 bus1=b3.1.2.3 bus2=b4.1.2.3 phases=3 linecode=research_small_illustrative_3ph length=0.202385768995 units=km normamps=180
New Line.l5 bus1=b4.1.2.3 bus2=b5.1.2.3 phases=3 linecode=research_small_illustrative_3ph length=0.202385768995 units=km normamps=180
New Line.l6 bus1=b5.1.2.3 bus2=b6.1.2.3 phases=3 linecode=research_small_illustrative_3ph length=0.202385768995 units=km normamps=180
New Line.l7 bus1=b6.1.2.3 bus2=b7.1.2.3 phases=3 linecode=research_small_illustrative_3ph length=0.202385768995 units=km normamps=180
New Line.l8 bus1=b7.1.2.3 bus2=b8.1.2.3 phases=3 linecode=research_small_illustrative_3ph length=0.202385768995 units=km normamps=180
New Line.l9 bus1=b8.1.2.3 bus2=b9.1.2.3 phases=3 linecode=research_small_illustrative_3ph length=0.202385768995 units=km normamps=180
New Line.l10 bus1=b9.1.2.3 bus2=b10.1.2.3 phases=3 linecode=research_small_illustrative_3ph length=0.202385768995 units=km normamps=180
New Line.l11 bus1=b10.1.2.3 bus2=b11.1.2.3 phases=3 linecode=research_small_illustrative_3ph length=0.202385768995 units=km normamps=180
New Line.l12 bus1=b3.1.2.3 bus2=b12.1.2.3 phases=3 linecode=research_small_illustrative_3ph length=0.101550489385 units=km normamps=180
New Line.l13 bus1=b12.1.2.3 bus2=b14.1.2.3 phases=3 linecode=research_small_illustrative_3ph length=0.101550489385 units=km normamps=180
New Line.l14 bus1=b12.1.2.3 bus2=b13.1.2.3 phases=3 linecode=research_small_illustrative_3ph length=0.101550489385 units=km normamps=180
New Line.l15 bus1=b14.1.2.3 bus2=b16.1.2.3 phases=3 linecode=research_small_illustrative_3ph length=0.101550489385 units=km normamps=180
New Line.l16 bus1=b13.1.2.3 bus2=b15.1.2.3 phases=3 linecode=research_small_illustrative_3ph length=0.101550489385 units=km normamps=180
New Line.l17 bus1=b16.1.2.3 bus2=b18.1.2.3 phases=3 linecode=research_small_illustrative_3ph length=0.101550489385 units=km normamps=180
New Line.l18 bus1=b15.1.2.3 bus2=b17.1.2.3 phases=3 linecode=research_small_illustrative_3ph length=0.101550489385 units=km normamps=180
New Line.l19 bus1=b18.1.2.3 bus2=b20.1.2.3 phases=3 linecode=research_small_illustrative_3ph length=0.101550489385 units=km normamps=180
New Line.l20 bus1=b17.1.2.3 bus2=b19.1.2.3 phases=3 linecode=research_small_illustrative_3ph length=0.101550489385 units=km normamps=180
New Line.l21 bus1=b7.1.2.3 bus2=b21.1.2.3 phases=3 linecode=research_small_illustrative_3ph length=0.101550489385 units=km normamps=180
New Line.l22 bus1=b21.1.2.3 bus2=b22.1.2.3 phases=3 linecode=research_small_illustrative_3ph length=0.101550489385 units=km normamps=180
New Line.l23 bus1=b21.1.2.3 bus2=b23.1.2.3 phases=3 linecode=research_small_illustrative_3ph length=0.101550489385 units=km normamps=180
New Line.l24 bus1=b23.1.2.3 bus2=b24.1.2.3 phases=3 linecode=research_small_illustrative_3ph length=0.101550489385 units=km normamps=180
New Line.l25 bus1=b23.1.2.3 bus2=b25.1.2.3 phases=3 linecode=research_small_illustrative_3ph length=0.101550489385 units=km normamps=180
New Line.l26 bus1=b25.1.2.3 bus2=b26.1.2.3 phases=3 linecode=research_small_illustrative_3ph length=0.101550489385 units=km normamps=180
New Line.l27 bus1=b25.1.2.3 bus2=b27.1.2.3 phases=3 linecode=research_small_illustrative_3ph length=0.101550489385 units=km normamps=180
New Line.l28 bus1=b27.1.2.3 bus2=b28.1.2.3 phases=3 linecode=research_small_illustrative_3ph length=0.101550489385 units=km normamps=180
New Line.l29 bus1=b11.1.2.3 bus2=b29.1.2.3 phases=3 linecode=research_small_illustrative_3ph length=0.101550489385 units=km normamps=180
New Line.l30 bus1=b29.1.2.3 bus2=b30.1.2.3 phases=3 linecode=research_small_illustrative_3ph length=0.101550489385 units=km normamps=180
New Line.l31 bus1=b29.1.2.3 bus2=b31.1.2.3 phases=3 linecode=research_small_illustrative_3ph length=0.101550489385 units=km normamps=180
New Line.l32 bus1=b31.1.2.3 bus2=b32.1.2.3 phases=3 linecode=research_small_illustrative_3ph length=0.101550489385 units=km normamps=180
New Line.l33 bus1=b31.1.2.3 bus2=b33.1.2.3 phases=3 linecode=research_small_illustrative_3ph length=0.101550489385 units=km normamps=180
New Line.l34 bus1=b33.1.2.3 bus2=b34.1.2.3 phases=3 linecode=research_small_illustrative_3ph length=0.101550489385 units=km normamps=180
New Line.l35 bus1=b33.1.2.3 bus2=b35.1.2.3 phases=3 linecode=research_small_illustrative_3ph length=0.101550489385 units=km normamps=180
New Line.l36 bus1=b35.1.2.3 bus2=b36.1.2.3 phases=3 linecode=research_small_illustrative_3ph length=0.101550489385 units=km normamps=180
