New Generator.pv_load_1 phases=1 bus1=user_1.2.0 conn=wye kv=0.230940107676 kw=1.67649645727 kvar=0 model=1 vminpu=.01 vmaxpu=2
New Generator.pv_load_2 phases=1 bus1=user_2.1.0 conn=wye kv=0.230940107676 kw=0.731872839743 kvar=0 model=1 vminpu=.01 vmaxpu=2
New Generator.pv_load_3 phases=1 bus1=user_3.3.0 conn=wye kv=0.230940107676 kw=1.18030343574 kvar=0 model=1 vminpu=.01 vmaxpu=2
New Generator.pv_load_4 phases=1 bus1=user_4.2.0 conn=wye kv=0.230940107676 kw=1.14707301678 kvar=0 model=1 vminpu=.01 vmaxpu=2
New Generator.pv_load_5 phases=1 bus1=user_5.3.0 conn=wye kv=0.230940107676 kw=0.975562764951 kvar=0 model=1 vminpu=.01 vmaxpu=2
New Generator.pv_load_6 phases=1 bus1=user_6.1.0 conn=wye kv=0.230940107676 kw=1.32594735366 kvar=0 model=1 vminpu=.01 vmaxpu=2
New Generator.pv_load_7 phases=1 bus1=user_7.2.0 conn=wye kv=0.230940107676 kw=1.10907585815 kvar=0 model=1 vminpu=.01 vmaxpu=2
New Generator.pv_load_8 phases=1 bus1=user_8.1.0 conn=wye kv=0.230940107676 kw=1.61889418982 kvar=0 model=1 vminpu=.01 vmaxpu=2
New Generator.pv_load_9 phases=1 bus1=user_9.3.0 conn=wye kv=0.230940107676 kw=0.999936491356 kvar=0 model=1 vminpu=.01 vmaxpu=2
New Generator.pv_load_10 phases=1 bus1=user_10.3.0 conn=wye kv=0.230940107676 kw=1.17698849229 kvar=0 model=1 vminpu=.01 vmaxpu=2
New Generator.pv_load_11 phases=1 bus1=user_11.1.0 conn=wye kv=0.230940107676 kw=1.36121600107 kvar=0 model=1 vminpu=.01 vmaxpu=2
New Generator.pv_load_12 phases=1 bus1=user_12.2.0 conn=wye kv=0.230940107676 kw=0.757818334465 kvar=0 model=1 vminpu=.01 vmaxpu=2
New Generator.pv_load_13 phases=1 bus1=user_13.2.0 conn=wye kv=0.230940107676 kw=1.38342107594 kvar=0 model=1 vminpu=.01 vmaxpu=2
New Generator.pv_load_14 phases=1 bus1=user_14.1.0 conn=wye kv=0.230940107676 kw=1.04816194616 kvar=0 model=1 vminpu=.01 vmaxpu=2
New Generator.pv_load_15 phases=1 bus1=user_15.1.0 conn=wye kv=0.230940107676 kw=2.24303889624 kvar=0 model=1 vminpu=.01 vmaxpu=2
New Generator.pv_load_16 phases=1 bus1=user_16.1.0 conn=wye kv=0.230940107676 kw=0.669131939008 kvar=0 model=1 vminpu=.01 vmaxpu=2
New Generator.pv_load_17 phases=1 bus1=user_17.3.0 conn=wye kv=0.230940107676 kw=1.21196499533 kvar=0 model=1 vminpu=.01 vmaxpu=2
New Generator.pv_load_18 phases=1 bus1=user_18.2.0 conn=wye kv=0.230940107676 kw=1.41953433025 kvar=0 model=1 vminpu=.01 vmaxpu=2
New Generator.pv_load_19 phases=1 bus1=user_19.1.0 conn=wye kv=0.230940107676 kw=0.548954538079 kvar=0 model=1 vminpu=.01 vmaxpu=2
New Generator.pv_load_20 phases=1 bus1=user_20.1.0 conn=wye kv=0.230940107676 kw=1.64777502341 kvar=0 model=1 vminpu=.01 vmaxpu=2
New Generator.pv_load_21 phases=1 bus1=user_21.2.0 conn=wye kv=0.230940107676 kw=1.58215462273 kvar=0 model=1 vminpu=.01 vmaxpu=2
New Generator.pv_load_22 phases=1 bus1=user_22.1.0 conn=wye kv=0.230940107676 kw=0.818654903652 kvar=0 model=1 vminpu=.01 vmaxpu=2
New Generator.pv_load_23 phases=1 bus1=user_23.1.0 conn=wye kv=0.230940107676 kw=0.797390597526 kvar=0 model=1 vminpu=.01 vmaxpu=2
New Generator.pv_load_24 phases=1 bus1=user_24.1.0 conn=wye kv=0.230940107676 kw=1.36863189638 kvar=0 model=1 vminpu=.01 vmaxpu=2
