New Line.l1 bus1=source.1.2.3 bus2=b1.1.2.3 phases=3 linecode=epri_j1_e38b9e239a23 length=0.0869675106897 units=km normamps=175.0
New Line.l2 bus1=b1.1.2.3 bus2=b2.1.2.3 phases=3 linecode=epri_j1_e38b9e239a23 length=0.0874166606246 units=km normamps=175.0
New Line.l3 bus1=b2.1.2.3 bus2=b3.1.2.3 phases=3 linecode=epri_j1_e38b9e239a23 length=0.135909328459 units=km normamps=175.0
New Line.l4 bus1=b3.1.2.3 bus2=b4.1.2.3 phases=3 linecode=epri_j1_e38b9e239a23 length=0.14037990935 units=km normamps=175.0
New Line.l5 bus1=b4.1.2.3 bus2=b5.1.2.3 phases=3 linecode=epri_ckt24_58550f34a866 length=0.0927904719281 units=km normamps=200.0
New Line.l6 bus1=b5.1.2.3 bus2=b6.1.2.3 phases=3 linecode=epri_j1_e38b9e239a23 length=0.0926176269209 units=km normamps=175.0
New Line.lv_main_1_1 bus1=lv_1.1.2.3 bus2=lv_1_branch_1.1.2.3 phases=3 linecode=nexans_abc_4x25_p123 length=0.016145894456 units=km normamps=109
New Line.service_1 bus1=lv_1_branch_1.1.2.3 bus2=user_1.1.2.3 phases=3 linecode=nexans_abc_4x25_p123 length=0.0111988663763 units=km normamps=109
New Line.service_2 bus1=user_1.1.2.3 bus2=user_2.1.2.3 phases=3 linecode=nexans_abc_4x25_p123 length=0.00444218914809 units=km normamps=109
New Line.service_3 bus1=user_2.1.2.3 bus2=user_3.1.2.3 phases=3 linecode=nexans_abc_4x25_p123 length=0.00693689265952 units=km normamps=109
New Line.service_4 bus1=user_3.1.2.3 bus2=user_4.1.2.3 phases=3 linecode=nexans_abc_4x25_p123 length=0.00856003190966 units=km normamps=109
New Line.service_5 bus1=user_4.1.2.3 bus2=user_5.1.2.3 phases=3 linecode=nexans_abc_4x25_p123 length=0.00344076236215 units=km normamps=109
New Line.lv_main_1_2 bus1=lv_1_branch_1.1.2.3 bus2=lv_1_branch_2.1.2.3 phases=3 linecode=nexans_abc_4x25_p123 length=0.0283730309129 units=km normamps=109
New Line.service_6 bus1=lv_1_branch_2.1.2.3 bus2=user_6.1.2.3 phases=3 linecode=nexans_abc_4x25_p123 length=0.00453092812376 units=km normamps=109
New Line.service_7 bus1=user_6.1.2.3 bus2=user_7.1.2.3 phases=3 linecode=nexans_abc_4x25_p123 length=0.00588222314664 units=km normamps=109
New Line.service_8 bus1=user_7.1.2.3 bus2=user_8.1.2.3 phases=3 linecode=nexans_abc_4x25_p123 length=0.0114637955518 units=km normamps=109
New Line.lv_main_2_1 bus1=lv_2.1.2.3 bus2=lv_2_branch_1.1.2.3 phases=3 linecode=nexans_abc_4x25_p123 length=0.0160612355128 units=km normamps=109
New Line.service_9 bus1=lv_2_branch_1.1.2.3 bus2=user_9.1.2.3 phases=3 linecode=nexans_abc_4x25_p123 length=0.00828857495461 units=km normamps=109
New Line.service_10 bus1=user_9.1.2.3 bus2=user_10.1.2.3 phases=3 linecode=nexans_abc_4x25_p123 length=0.00398614721985 units=km normamps=109
New Line.service_11 bus1=user_10.1.2.3 bus2=user_11.1.2.3 phases=3 linecode=nexans_abc_4x25_p123 length=0.00303861692055 units=km normamps=109
New Line.service_12 bus1=user_11.1.2.3 bus2=user_12.1.2.3 phases=3 linecode=nexans_abc_4x25_p123 length=0.0114375874786 units=km normamps=109
New Line.service_13 bus1=user_12.1.2.3 bus2=user_13.1.2.3 phases=3 linecode=nexans_abc_4x25_p123 length=0.00539053668021 units=km normamps=109
New Line.service_14 bus1=user_13.1.2.3 bus2=user_14.1.2.3 phases=3 linecode=nexans_abc_4x25_p123 length=0.0118350028148 units=km normamps=109
New Line.lv_main_2_2 bus1=lv_2.1.2.3 bus2=lv_2_branch_2.1.2.3 phases=3 linecode=nexans_abc_4x25_p123 length=0.0122571351436 units=km normamps=109
New Line.service_15 bus1=lv_2_branch_2.1.2.3 bus2=user_15.1.2.3 phases=3 linecode=nexans_abc_4x25_p123 length=0.00865950175886 units=km normamps=109
New Line.service_16 bus1=user_15.1.2.3 bus2=user_16.1.2.3 phases=3 linecode=nexans_abc_4x25_p123 length=0.00376938889844 units=km normamps=109
New Line.service_17 bus1=user_16.1.2.3 bus2=user_17.1.2.3 phases=3 linecode=nexans_abc_4x25_p123 length=0.00788809353587 units=km normamps=109
New Line.lv_main_3_1 bus1=lv_3.1.2.3 bus2=lv_3_branch_1.1.2.3 phases=3 linecode=nexans_abc_4x25_p123 length=0.0207090798872 units=km normamps=109
New Line.service_18 bus1=lv_3_branch_1.1.2.3 bus2=user_18.1.2.3 phases=3 linecode=nexans_abc_4x25_p123 length=0.00607609935297 units=km normamps=109
New Line.service_19 bus1=user_18.1.2.3 bus2=user_19.1.2.3 phases=3 linecode=nexans_abc_4x25_p123 length=0.00806443082226 units=km normamps=109
New Line.service_20 bus1=user_19.1.2.3 bus2=user_20.1.2.3 phases=3 linecode=nexans_abc_4x25_p123 length=0.00370584133711 units=km normamps=109
New Line.lv_main_3_2 bus1=lv_3_branch_1.1.2.3 bus2=lv_3_branch_2.1.2.3 phases=3 linecode=nexans_abc_4x25_p123 length=0.0162481173466 units=km normamps=109
New Line.service_21 bus1=lv_3_branch_2.1.2.3 bus2=user_21.1.2.3 phases=3 linecode=nexans_abc_4x25_p123 length=0.0073308482341 units=km normamps=109
New Line.service_22 bus1=user_21.1.2.3 bus2=user_22.1.2.3 phases=3 linecode=nexans_abc_4x25_p123 length=0.00315680123044 units=km normamps=109
New Line.service_23 bus1=user_22.1.2.3 bus2=user_23.1.2.3 phases=3 linecode=nexans_abc_4x25_p123 length=0.00912235740039 units=km normamps=109
New Line.service_24 bus1=user_23.1.2.3 bus2=user_24.1.2.3 phases=3 linecode=nexans_abc_4x25_p123 length=0.00598627946884 units=km normamps=109
