New Load.load_1 phases=1 bus1=user_1.2.0 conn=wye kv=0.230940107676 kw=5.58832152423 kvar=1.83679245964 model=1 vminpu=.01 vmaxpu=2
New Load.load_2 phases=1 bus1=user_2.1.0 conn=wye kv=0.230940107676 kw=2.43957613248 kvar=0.801849898118 model=1 vminpu=.01 vmaxpu=2
New Load.load_3 phases=1 bus1=user_3.3.0 conn=wye kv=0.230940107676 kw=3.9343447858 kvar=1.29315659538 model=1 vminpu=.01 vmaxpu=2
New Load.load_4 phases=1 bus1=user_4.2.0 conn=wye kv=0.230940107676 kw=3.8235767226 kvar=1.25674889365 model=1 vminpu=.01 vmaxpu=2
New Load.load_5 phases=1 bus1=user_5.3.0 conn=wye kv=0.230940107676 kw=3.25187588317 kvar=1.06883991481 model=1 vminpu=.01 vmaxpu=2
New Load.load_6 phases=1 bus1=user_6.1.0 conn=wye kv=0.230940107676 kw=4.41982451221 kvar=1.45272606484 model=1 vminpu=.01 vmaxpu=2
New Load.load_7 phases=1 bus1=user_7.2.0 conn=wye kv=0.230940107676 kw=3.69691952715 kvar=1.2151186867 model=1 vminpu=.01 vmaxpu=2
New Load.load_8 phases=1 bus1=user_8.1.0 conn=wye kv=0.230940107676 kw=5.39631396607 kvar=1.7736826272 model=1 vminpu=.01 vmaxpu=2
New Load.load_9 phases=1 bus1=user_9.3.0 conn=wye kv=0.230940107676 kw=3.33312163785 kvar=1.09554410299 model=1 vminpu=.01 vmaxpu=2
New Load.load_10 phases=1 bus1=user_10.3.0 conn=wye kv=0.230940107676 kw=3.92329497429 kvar=1.28952469798 model=1 vminpu=.01 vmaxpu=2
New Load.load_11 phases=1 bus1=user_11.1.0 conn=wye kv=0.230940107676 kw=4.53738667022 kvar=1.49136687755 model=1 vminpu=.01 vmaxpu=2
New Load.load_12 phases=1 bus1=user_12.2.0 conn=wye kv=0.230940107676 kw=2.52606111488 kvar=0.830276137172 model=1 vminpu=.01 vmaxpu=2
New Load.load_13 phases=1 bus1=user_13.2.0 conn=wye kv=0.230940107676 kw=4.61140358648 kvar=1.51569506144 model=1 vminpu=.01 vmaxpu=2
New Load.load_14 phases=1 bus1=user_14.1.0 conn=wye kv=0.230940107676 kw=3.49387315386 kvar=1.14838057119 model=1 vminpu=.01 vmaxpu=2
New Load.load_15 phases=1 bus1=user_15.1.0 conn=wye kv=0.230940107676 kw=7.47679632081 kvar=2.45750410831 model=1 vminpu=.01 vmaxpu=2
New Load.load_16 phases=1 bus1=user_16.1.0 conn=wye kv=0.230940107676 kw=2.23043979669 kvar=0.733110108732 model=1 vminpu=.01 vmaxpu=2
New Load.load_17 phases=1 bus1=user_17.3.0 conn=wye kv=0.230940107676 kw=4.03988331778 kvar=1.32784543333 model=1 vminpu=.01 vmaxpu=2
New Load.load_18 phases=1 bus1=user_18.2.0 conn=wye kv=0.230940107676 kw=4.73178110084 kvar=1.55526123703 model=1 vminpu=.01 vmaxpu=2
New Load.load_19 phases=1 bus1=user_19.1.0 conn=wye kv=0.230940107676 kw=1.82984846026 kvar=0.601442103774 model=1 vminpu=.01 vmaxpu=2
New Load.load_20 phases=1 bus1=user_20.1.0 conn=wye kv=0.230940107676 kw=5.49258341137 kvar=1.80532486369 model=1 vminpu=.01 vmaxpu=2
New Load.load_21 phases=1 bus1=user_21.2.0 conn=wye kv=0.230940107676 kw=5.27384874243 kvar=1.73343025476 model=1 vminpu=.01 vmaxpu=2
New Load.load_22 phases=1 bus1=user_22.1.0 conn=wye kv=0.230940107676 kw=2.72884967884 kvar=0.896929514857 model=1 vminpu=.01 vmaxpu=2
New Load.load_23 phases=1 bus1=user_23.1.0 conn=wye kv=0.230940107676 kw=2.65796865842 kvar=0.873632050086 model=1 vminpu=.01 vmaxpu=2
New Load.load_24 phases=1 bus1=user_24.1.0 conn=wye kv=0.230940107676 kw=4.56210632128 kvar=1.49949183394 model=1 vminpu=.01 vmaxpu=2
